# OpenSim document version 40000
InverseKinematicsTool:
  time_range: 0 3.6667
  output_motion_file: P03/Run 2.mot
  marker_file: P03/Run 2.trc
  IKTaskSet:
    IKMarkerTask NOSE: apply=true weight=1
    IKMarkerTask LEFT_EAR: apply=true weight=1
    IKMarkerTask RIGHT_EAR: apply=true weight=1
    IKMarkerTask RIGHT_SHOULDER: apply=true weight=1
    IKMarkerTask RIGHT_ELBOW: apply=true weight=1
    IKMarkerTask RIGHT_WRIST: apply=true weight=1
    IKMarkerTask RIGHT_THUMB: apply=true weight=1
    IKMarkerTask RIGHT_INDEX: apply=true weight=1
    IKMarkerTask RIGHT_HIP: apply=true weight=1
    IKMarkerTask RIGHT_KNEE: apply=true weight=1
    IKMarkerTask RIGHT_ANKLE: apply=true weight=1
    IKMarkerTask RIGHT_HEEL: apply=true weight=1
    IKMarkerTask RIGHT_FOOT: apply=true weight=1
    IKMarkerTask LEFT_SHOULDER: apply=true weight=1
    IKMarkerTask LEFT_ELBOW: apply=true weight=1
    IKMarkerTask LEFT_WRIST: apply=true weight=1
    IKMarkerTask LEFT_THUMB: apply=true weight=1
    IKMarkerTask LEFT_INDEX: apply=true weight=1
    IKMarkerTask LEFT_HIP: apply=true weight=1
    IKMarkerTask LEFT_KNEE: apply=true weight=1
    IKMarkerTask LEFT_ANKLE: apply=true weight=1
    IKMarkerTask LEFT_HEEL: apply=true weight=1
    IKMarkerTask LEFT_FOOT: apply=true weight=1
