# OpenSim document version 40000
AnalyzeTool P3:
  model_file: C:\Users\uqglicht_local\OneDrive - The University of Queensland\Documents\Data\ZEDForcePlate\Rajagopal2015_pose34.osim
  replace_force_set: false
  results_directory: P03
  output_precision: 8
  initial_time: 9.6
  final_time: 13.2667
  solve_for_equilibrium_for_auxiliary_states: false
  maximum_number_of_integrator_steps: 20000
  maximum_integrator_step_size: 1
  minimum_integrator_step_size: 1e-8
  integrator_error_tolerance: 1e-5
  coordinates_file: P03/SideStep 2.mot
  lowpass_cutoff_frequency_for_coordinates: 6
  AnalysisSet Analyses:
    BodyKinematics: start_time=9.6 end_time=13.2667 step_interval=1 in_degrees=true bodies=all
        express_results_in_body_local_frame=false
