# OpenSim document version 40000
ScaleTool FullBodyModel_ZED_pose34-scaled:
  mass: 85 [kg]
  height: -1
  age: -1
  ModelScaler:
    apply: true
    scaling_order: measurements manualScale
    marker_file: Data/Videos/markerless_walking/LJ_run/run 1.trc
    time_range: 0.02 5
    preserve_mass_distribution: true
    MeasurementSet:
      Measurement Pelvis: apply=true
        MarkerPair: markers=(LEFT_HIP RIGHT_HIP)
        BodyScale pelvis: axes=(X Y Z)
      Measurement Femur_R: apply=true
        MarkerPair: markers=(RIGHT_HIP RIGHT_KNEE)
        BodyScale femur_r: axes=(X Y Z)
      Measurement Tibia_R: apply=true
        MarkerPair: markers=(RIGHT_KNEE RIGHT_ANKLE)
        BodyScale tibia_r: axes=(X Y Z)
        BodyScale patella_r: axes=(X Y Z)
      Measurement Foot_R: apply=true
        MarkerPair: markers=(RIGHT_HEEL RIGHT_FOOT_INDEX)
        BodyScale talus_r: axes=(X Y Z)
        BodyScale calcn_r: axes=(X Y Z)
        BodyScale toes_r: axes=(X Y Z)
      Measurement Femur_L: apply=true
        MarkerPair: markers=(LEFT_HIP LEFT_KNEE)
        BodyScale femur_l: axes=(X Y Z)
      Measurement TIbia_L: apply=true
        MarkerPair: markers=(LEFT_KNEE LEFT_ANKLE)
        BodyScale tibia_l: axes=(X Y Z)
        BodyScale patella_l: axes=(X Y Z)
      Measurement Foot_L: apply=true
        MarkerPair: markers=(LEFT_HEEL LEFT_FOOT_INDEX)
        BodyScale talus_l: axes=(X Y Z)
        BodyScale calcn_l: axes=(X Y Z)
        BodyScale toes_l: axes=(X Y Z)
      Measurement Torso_Height: apply=true
        MarkerPair: markers=(LEFT_HIP LEFT_SHOULDER)
        MarkerPair: markers=(RIGHT_HIP RIGHT_SHOULDER)
        BodyScale torso: axes=Y
      Measurement Torso_Width: apply=true
        MarkerPair: markers=(RIGHT_SHOULDER LEFT_SHOULDER)
        BodyScale torso: axes=(X Z)
      Measurement Humerus_R: apply=true
        MarkerPair: markers=(RIGHT_SHOULDER RIGHT_ELBOW)
        BodyScale humerus_r: axes=(X Y Z)
      Measurement Forearm_R: apply=true
        MarkerPair: markers=(RIGHT_ELBOW RIGHT_WRIST)
        BodyScale ulna_r: axes=(X Y Z)
        BodyScale radius_r: axes=(X Y Z)
      Measurement Hand_R: apply=true
        MarkerPair: markers=(RIGHT_WRIST RIGHT_INDEX)
        MarkerPair: markers=(RIGHT_INDEX RIGHT_THUMB)
        BodyScale hand_r: axes=(X Y Z)
      Measurement Humerus_L: apply=true
        MarkerPair: markers=(LEFT_SHOULDER LEFT_ELBOW)
        BodyScale humerus_l: axes=(X Y Z)
      Measurement Forearm_L: apply=true
        MarkerPair: markers=(LEFT_ELBOW LEFT_WRIST)
        BodyScale ulna_l: axes=(X Y Z)
        BodyScale radius_l: axes=(X Y Z)
      Measurement Hand_L: apply=true
        MarkerPair: markers=(LEFT_WRIST LEFT_INDEX)
        MarkerPair: markers=(LEFT_INDEX LEFT_THUMB)
        BodyScale hand_l: axes=(X Y Z)
    ScaleSet:
      Scale: scales=(1.02 1.05 1.06) segment=pelvis apply=true
      Scale: scales=(1 1 1) segment=femur_r apply=true
      Scale: scales=(1 1 1) segment=tibia_r apply=true
      Scale: scales=(1 1 1) segment=patella_r apply=true
      Scale: scales=(1 1 1) segment=talus_r apply=true
      Scale: scales=(1 1 1) segment=calcn_r apply=true
      Scale: scales=(1 1 1) segment=toes_r apply=true
  MarkerPlacer:
    apply: true
    marker_file: Data/Videos/markerless_walking/LJ_run/run 1.trc
    time_range: 0.02 1.6667
    max_marker_movement: -1
    IKTaskSet:
      IKMarkerTask NOSE: apply=true weight=1
      IKMarkerTask RIGHT_SHOULDER: apply=true weight=1
      IKMarkerTask RIGHT_ELBOW: apply=true weight=1
      IKMarkerTask RIGHT_WRIST: apply=true weight=1
      IKMarkerTask RIGHT_THUMB: apply=true weight=1
      IKMarkerTask RIGHT_EAR: apply=true weight=1
      IKMarkerTask RIGHT_INDEX: apply=true weight=1
      IKMarkerTask RIGHT_HIP: apply=true weight=1
      IKMarkerTask RIGHT_KNEE: apply=true weight=1
      IKMarkerTask RIGHT_ANKLE: apply=true weight=1
      IKMarkerTask RIGHT_HEEL: apply=true weight=1
      IKMarkerTask RIGHT_FOOT_INDEX: apply=true weight=1
      IKMarkerTask LEFT_SHOULDER: apply=true weight=1
      IKMarkerTask LEFT_ELBOW: apply=true weight=1
      IKMarkerTask LEFT_WRIST: apply=true weight=1
      IKMarkerTask LEFT_THUMB: apply=true weight=1
      IKMarkerTask LEFT_EAR: apply=true weight=1
      IKMarkerTask LEFT_INDEX: apply=true weight=1
      IKMarkerTask LEFT_HIP: apply=true weight=1
      IKMarkerTask LEFT_KNEE: apply=true weight=1
      IKMarkerTask LEFT_ANKLE: apply=true weight=1
      IKMarkerTask LEFT_HEEL: apply=true weight=1
      IKMarkerTask LEFT_FOOT_INDEX: apply=true weight=1
